// COMSOL Multiphysics 6.1.0.282 model "validationTE.mph"
// Outline of the model tree

Parameters
  mu0 = mu0_const
  eps0 = epsilon0_const
  c = c_const
  n = 1+0.1j
  wl = 10e-9 [m]
  E0 = sqrt(2[W/m^2]/(c*eps0))
  w = c * 2 * pi / wl
  k0 = 4.44288294e+08 [1/m]
  k1r = 5.02807249e+08 [1/m]
  k1i = 3.92580037e+08 [1/m]
  k1 = k1r +j*k1i

Geometry
  geom1 "Geometry 1" (1D, length unit m)
    i1: Interval | coord = {0, 100e-9}
    i2: Interval | coord = {-2.0E-8, 0}
    fin: Finalize "Form Union"

Physics
  tl: TransmissionLine on all domains
    dependent variable V
    tle1: TransmissionLineEquation (default) | R = 0; L = mu0; G = imag(k1^2/w^2/mu0) * w; C = real(k1^2/w^2/mu0)
    oc1: OpenCircuit (default)
    init1: init "Initial Values 1" (default)
    iw1: IncomingWave on boundaries 1, 2 | Vin = E0 * 1[m]
    tle2: TransmissionLineEquation on domains 1 | R = 0; L = mu0; G = 0; C = real(k0^2/w^2/mu0)

Mesh
  mesh1 "Mesh 1"
    size: MeshSizeDefault | hmax = 1e-11; hauto = 1; custom = on
    edg1: Edge on remaining entities

Studies
  std1 "Study 1"
    freq: Frequency "Frequency Domain" | punit = Hz; plist = 2.9979e8 / 10e-9

Solver configurations
  sol1 "Solution 1" (study std1)
    v1: Variables "Dependent Variables 1"
    s1: Stationary "Stationary Solver 1" | linpmethod = sol
      dDef: Direct
      p1: Parametric | pname = freq; plistarr = 2.9979e8 / 10e-9; punit = Hz; pcontinuationmode = no
      fc1: FullyCoupled | linsolver = dDef

Datasets
  dset1: Solution | solution = sol1

Derived values
  int1: IntLine "Line Integration 1" on domains 2 | data = dset1; table = tbl2; expr = 0.5*V*conj(V) * tl.G

Tables
  tbl2: Table
    // Line Integration 1
    freq (Hz) | 0.5*V*conj(V) * tl.G (W)
    2.9979e+16 | 0.601123

Plots
  pg1: PlotGroup1D "Electric Potential (tl)" | data = dset1
    lngr2: LineGraph on all domains | expr = -d(V*conj(tl.I),x)/2; xdata = expr; xdataexpr = x
    lngr1: LineGraph on all domains | expr = tl.G*0.5*V*conj(V); xdata = expr; xdataexpr = x
  pg2: PlotGroup1D "1D Plot Group 2" | data = dset1
    lngr1: LineGraph (disabled) on all domains | expr = real(V)/E0; xdata = expr; xdataexpr = x
    lngr2: LineGraph (disabled) on all domains | expr = imag(V)/E0; xdata = expr; xdataexpr = x
    lngr3: LineGraph on all domains | expr = abs(V)/E0; xdata = expr; xdataexpr = x